clear
variable seed equal 284565
units metal
boundary p p p
box tilt large
atom_style full
read_data quartz.data
replicate 5 5 5
mass 1 28.0855
mass 2 15.9994
pair_style tersoff
pair_coeff * * ML-Tersoff.tersoff Si O
neighbor 2.0 nsq
neigh_modify delay 0 every 1 check yes
thermo 100
thermo_style custom step pe press density lx ly lz cella cellb cellc cellalpha cellbeta cellgamma
thermo_modify norm yes flush yes
min_style cg
fix boxrelax all box/relax tri 1.0 vmax 0.001
minimize 1e-12 1e-12 10000 20000
unfix boxrelax
min_style cg
minimize 1e-08 1e-10 5000 100000
print "FINAL_MLT_TRI: density=$(density) lx=$(lx) ly=$(ly) lz=$(lz) pe=$(pe)"
